// SBML level 2 version 3

model temp()

  // Compartments:
  compartment cell = 1;

  // Species:
  species TGFb_r in cell = TGFb_0; TGFb_r is "TGFb(r)";
  species IL6_r in cell = IL6_0; IL6_r is "IL6(r)";
  species IL6R_activity_I_stat3_site in cell = IL6R_0; IL6R_activity_I_stat3_site is "IL6R(activity~I,stat3_site)";
  species TGFbR_activity_I_smad3_site in cell = TGFbR_0; TGFbR_activity_I_smad3_site is "TGFbR(activity~I,smad3_site)";
  species S5 in cell = SMAD3_0; S5 is "SMAD3(phos~U,pka_site,smad4_site,stat3_site,tgfbr_site)";
  species SMAD4_s3_site in cell = SMAD4_0; SMAD4_s3_site is "SMAD4(s3_site)";
  species STAT3m_il6r_site_phos_U in cell = STAT3m_0; STAT3m_il6r_site_phos_U is "STAT3m(il6r_site,phos~U)";
  species PKA_phos_U_s3s4_site in cell = PKA_0; PKA_phos_U_s3s4_site is "PKA(phos~U,s3s4_site)";
  species IL6R_activity_A_stat3_site in cell = 0; IL6R_activity_A_stat3_site is "IL6R(activity~A,stat3_site)";
  species TGFbR_activity_A_smad3_site in cell = 0; TGFbR_activity_A_smad3_site is "TGFbR(activity~A,smad3_site)";
  species S11 in cell = 0; S11 is "SMAD3(phos~U,pka_site,smad4_site,stat3_site,tgfbr_site!1).TGFbR(activity~A,smad3_site!1)";
  species S12 in cell = 0; S12 is "IL6R(activity~A,stat3_site!1).STAT3m(il6r_site!1,phos~U)";
  species S13 in cell = 0; S13 is "SMAD3(phos~P,pka_site,smad4_site,stat3_site,tgfbr_site)";
  species STAT3m_il6r_site_phos_P in cell = 0; STAT3m_il6r_site_phos_P is "STAT3m(il6r_site,phos~P)";
  species STAT3d_active_s3_site in cell = 0; STAT3d_active_s3_site is "STAT3d_active(s3_site)";
  species S16 in cell = 0; S16 is "SMAD3(phos~P,pka_site,smad4_site!1,stat3_site,tgfbr_site).SMAD4(s3_site!1)";
  species S17 in cell = 0; S17 is "SMAD3(phos~P,pka_site,smad4_site,stat3_site!1,tgfbr_site).STAT3d_active(s3_site!1)";
  species S18 in cell = 0; S18 is "PKA(phos~U,s3s4_site!1).SMAD3(phos~P,pka_site!1,smad4_site!2,stat3_site,tgfbr_site).SMAD4(s3_site!2)";
  species S19 in cell = 0; S19 is "PKA(phos~P,s3s4_site!1).SMAD3(phos~P,pka_site!1,smad4_site!2,stat3_site,tgfbr_site).SMAD4(s3_site!2)";
  species PKA_phos_P_s3s4_site in cell = 0; PKA_phos_P_s3s4_site is "PKA(phos~P,s3s4_site)";

  // Parameters:
  TGFb_0 = 1;
  IL6_0 = 0;
  k_il6_activation = 1;
  k_tgfb_activation = 0.1;
  k_phos_smad3 = 0.015;
  k_dephos_smad3 = 0.035;
  kf_stat3_bind = 0.12;
  k_phos_stat3 = 0.15;
  kf_dimer = 0.5;
  k_dephos_stat3d = 0.06;
  kf_smad3_bind = 0.08;
  kf_s3s4 = 0.6;
  kf_s3stat3d = 4;
  k_dephos_s3stat3d_complex = 1;
  kf_pka_bind = 1;
  Kd_pka_bind = 0.1;
  k_phos_pka = 0.5;
  IL6R_0 = 250;
  TGFbR_0 = 40;
  SMAD3_0 = 45;
  SMAD4_0 = 30;
  STAT3m_0 = 250;
  PKA_0 = 50;
  _rateLaw1 = kf_pka_bind*Kd_pka_bind;

  // Assignment rules:
  Free_IL6_obs := 0 + IL6_r;
  Free_TGFb_obs := 0 + TGFb_r;
  IL6R_Active := IL6R_activity_A_stat3_site + S12;
  TGFbR_Active := TGFbR_activity_A_smad3_site + S11;
  pSMAD3_obs := S13 + S16 + S17 + S18 + S19;
  pSTAT3_obs := 0 + STAT3m_il6r_site_phos_P;
  STAT3d_active_obs := STAT3d_active_s3_site + S17;
  S3S4_complex_obs := S16 + S18 + S19;
  S3STAT3d_complex_obs := 0 + S17;
  PKA_active := S19 + PKA_phos_P_s3s4_site;

  // Reactions:
  R1: IL6_r + IL6R_activity_I_stat3_site => IL6_r + IL6R_activity_A_stat3_site; k_il6_activation*IL6_r*IL6R_activity_I_stat3_site;
  R2: TGFb_r + TGFbR_activity_I_smad3_site => TGFb_r + TGFbR_activity_A_smad3_site; k_tgfb_activation*TGFb_r*TGFbR_activity_I_smad3_site;
  R3: S5 + TGFbR_activity_A_smad3_site => S11; kf_smad3_bind*S5*TGFbR_activity_A_smad3_site;
  R4: STAT3m_il6r_site_phos_U + IL6R_activity_A_stat3_site => S12; kf_stat3_bind*STAT3m_il6r_site_phos_U*IL6R_activity_A_stat3_site;
  R5: S11 => TGFbR_activity_A_smad3_site + S13; k_phos_smad3*S11;
  R6: S12 => IL6R_activity_A_stat3_site + STAT3m_il6r_site_phos_P; k_phos_stat3*S12;
  R7: S13 => S5; k_dephos_smad3*S13;
  R8: STAT3m_il6r_site_phos_P + STAT3m_il6r_site_phos_P => STAT3d_active_s3_site; 0.5*kf_dimer*STAT3m_il6r_site_phos_P*STAT3m_il6r_site_phos_P;
  R9: SMAD4_s3_site + S13 => S16; kf_s3s4*SMAD4_s3_site*S13;
  R10: STAT3d_active_s3_site => STAT3m_il6r_site_phos_U + STAT3m_il6r_site_phos_U; k_dephos_stat3d*STAT3d_active_s3_site;
  R11: S13 + STAT3d_active_s3_site => S17; kf_s3stat3d*S13*STAT3d_active_s3_site;
  R12: PKA_phos_U_s3s4_site + S16 => S18; kf_pka_bind*PKA_phos_U_s3s4_site*S16;
  R13: S18 => PKA_phos_U_s3s4_site + S16; _rateLaw1*S18;
  R14: S18 => S19; k_phos_pka*S18;
  R15: S17 => S5 + STAT3d_active_s3_site; k_dephos_s3stat3d_complex*S17;
  R16: S19 => S16 + PKA_phos_P_s3s4_site; k_dephos_s3stat3d_complex*S19;

  // Unit definitions:
  unit substance = item;
end
